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/COM,ANSYS RELEASE 2024 R2           BUILD 24.2      UP20240603       15:05:23
/PREP7
/TITLE,Test_Piston--Static Structural (A5)
ANTYPE, 0
EQSLV,PCG , 0.00000,,
TOFFST,  273.150000
DMPOPT,ESAV,NO
DMPOPT,EMAT,NO
*IF,_CDRDOFF,EQ,1,THEN     !if solid model was read in
_CDRDOFF=             !reset flag, numoffs already performed
*ELSE              !offset database for the following FE model
NUMOFF,NODE,    28723
NUMOFF,ELEM,   142737
NUMOFF,MAT ,        1
NUMOFF,TYPE,        1
*ENDIF
*SET,TEMPERATURE,'TEMP                            '
*SET,_ASMDIAG,  79.01107517304
*SET,_DS_PROGRESS,  999.0000000000
*SET,_MAXELEMNUM,  142737.0000000
*SET,_MAXELEMTYPE,  1.000000000000
*SET,_MAXNODENUM,  28723.00000000
*SET,_NUMELEM,  142737.0000000
*SET,_NUMNODE,  28723.00000000
*SET,_RETURN ,  0.000000000000
*SET,_STATUS ,  0.000000000000
*SET,_THICKRATIO,  1.000000000000
*SET,_WALLBSOL,  15.08972222222
*SET,_WALLSTRT,  15.08972222222
*SET,_WB_PROJECTSCRATCH_DIR(1,       1,       1),'D:\Simulation_FEM\Ansys\Test_Piston\_ProjectScratch\Scr26.00000\                                                                                                                                                                                            '
*SET,_WB_SOLVERFILES_DIR(1,       1,       1),'D:\Simulation_FEM\Ansys\Test_Piston\Test_Piston_files\dp0\SYS\MECH\                                                                                                                                                                                     '
*SET,_WB_USERFILES_DIR(1,       1,       1),'D:\Simulation_FEM\Ansys\Test_Piston\Test_Piston_files\user_files\                                                                                                                                                                                       '
*SET,_XMAX   ,  10.25000000000
*SET,_XMIN   , -10.25000000000
*SET,_YMAX   ,  10.25000000000
*SET,_YMIN   , -10.25000000000
*SET,_ZMAX   ,  73.50000000000
*SET,_ZMIN   ,  0.000000000000
DOF,DELETE
ETBLOCK,        1,        1
(2i9,19a9)
        1      185        0        0        0        0        0        0        0        0        0        0        0        0        0        0        0        0        0        0        0
       -1
NBLOCK,6,SOLID,     28723,     28723
(3i9,6.0E+21130.00000)
        1        0        0 9.55359 0.00000 66.20718
        2        0        0-9.55359-1.169977322E-15 66.20718
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N,UNBL,LOC,       -1,
EBLOCK,19,SOLID,    142737,    142737
(19i10)
         1         1         1         1         0         0         0         0         8         0         1     19004     22948     28723     28723     22950     22950     22950     22950
         1         1         1         1         0         0         0         0         8         0         2     19004     22944     28723     28723     22948     22948     22948     22948
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